**
**   A bleed tapping in a gas network.
**
**   The orifice from CalculiX's test/linearnet.inp, made a BLEED TAPPING
**   with ps1/pt1 = 0.5 and discharge curve 1 at 0.01 kg/s.  orifice.f
**   declared the curve number real*8 while cd_bleedtapping.f reads an
**   integer, so the curve came through as 0 -- no curve at all -- and the
**   element summary's I2 edit descriptor then stopped ccx with "Expected
**   INTEGER ... got REAL".  The summary in bleedtap.net must name curve 1
**   and give the cd interpolated from it: DAB = (1 - p2/p1)/(1 - ps1/pt1)
**   between curve 1's points (0.24, 0.167) and (0.52, 0.310).
**
*NODE,NSET=NALL
1, 1, 0, 0
2, 2, 0, 0
3, 3, 0, 0
4, 4, 0, 0
5, 5, 0, 0
6, 6, 0, 0
7, 7, 0, 0
*ELEMENT, TYPE=D,ELSET=EGAS
2, 2, 3, 4
3, 4, 5, 6
*ELEMENT, TYPE=D,ELSET=EIO
1, 0, 1, 2
4, 6, 7, 0
*MATERIAL,NAME=GAS
*FLUID CONSTANTS
 0.1002353938D+4, 0.1711000000D-04, 0.27315D+03
 0.1002353938D+4, 0.1949281697D-04, 0.32315D+03
 0.1002353938D+4, 0.2169996934D-04, 0.37315D+03
 0.1002353938D+4, 0.2376071192D-04, 0.42315D+03
 0.1002353938D+4, 0.2569766947D-04, 0.47315D+03
 0.1002353938D+4, 0.2752859550D-04, 0.52315D+03
 0.1002353938D+4, 0.2926763423D-04, 0.57315D+03
 0.1002353938D+4, 0.3092621879D-04, 0.62315D+03
 0.1002353938D+4, 0.3251371525D-04, 0.67315D+03
 0.1002353938D+4, 0.3403789021D-04, 0.72315D+03
 0.1002353938D+4, 0.3550525531D-04, 0.77315D+03
 0.1002353938D+4, 0.3692132461D-04, 0.82315D+03
 0.1002353938D+4, 0.3829080968D-04, 0.87315D+03
 0.1002353938D+4, 0.3961776952D-04, 0.92315D+03
 0.1002353938D+4, 0.4090572698D-04, 0.97315D+03
 0.1002353938D+4, 0.4215776043D-04, 0.10231D+04
 0.1002353938D+4, 0.4337657658D-04, 0.10732D+04
 0.1002353938D+4, 0.4456456897D-04, 0.11232D+04
 0.1002353938D+4, 0.4572386531D-04, 0.11732D+04
 0.1002353938D+4, 0.4685636617D-04, 0.12232D+04
*SPECIFIC GAS CONSTANT
287.
*FLUID SECTION,ELSET=EGAS,TYPE=BLEED TAPPING,MATERIAL=GAS
3.1415e-4,0.5,1,0
*FLUID SECTION,ELSET=EIO,TYPE=INOUT,MATERIAL=GAS
*INITIAL CONDITIONS, TYPE=TOTAL PRESSURE
6,0.06e6
4,0.07e6
*BOUNDARY,MASS FLOW
1,1,1,0.01
2,0,0,500
6,0,0,500
2,2,2,0.08e6
*STEP,INC=100
*HEAT TRANSFER,STEADY STATE
1.,1.
*NODE PRINT,NSET=NALL
U,NT
*END STEP
